f(x) := (e^(-sin(x)) + e^cos(x))*e^(sin(3*x) - sin(x))
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a := 1
b := 2
n1 := 100
n2 := 200
n3 := 400
h1 := (b - a)/n1
h2 := (b - a)/n2
h3 := (b - a)/n3
k := 0 .. n3
i := 0 .. n1
j := 0 .. n2
t0 := a
t1i := t0 + i*h1  # error: Значение должно быть скаляром или матрицей.
t2j := t0 + j*h2  # error: Значение должно быть скаляром или матрицей.
t3k := t0 + k*h3  # error: Значение должно быть скаляром или матрицей.
